<?xml version="1.0" ?>

<fdm_config name="Hexa550" release="ALPHA" version="3.0">
    <!-- Hexacopter 550 — generated by scripts/generate-multirotor.mjs. -->
    <fileheader/>

    <metrics file="Metrics.xml"/>
    <mass_balance file="Mass.xml"/>
    <ground_reactions file="Gear.xml"/>
    <propulsion file="Propulsion.xml"/>
    <system file="Effectors.xml"/>
    <flight_control file="FlightControl.xml"/>
    <system file="SensorImu.xml"/>
    <system file="SensorBaro.xml"/>
    <system file="SensorGps.xml"/>
    <aerodynamics file="Aero.xml"/>

</fdm_config>
